# 3)
f(x) := 4*x - 3*ln(x) - 4
phi(x) := 1 + 0.75*ln(x)
x := 0.1, 0.11 .. 3
x0 := 1.05
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eps := 10^-4
x1 := phi(x0)
d0 := |x1 - x0|
x1 = 1.03659
d0 = 0.0134074
x2 := phi(x1)
d1 := |x2 - x1|
x2 = 1.02695
d1 = 0.00963837
x3 := phi(x2)
d2 := |x3 - x2|
x3 = 1.01995
d2 = 0.00700622
x4 := phi(x3)
d3 := |x4 - x3|
x4 = 1.01481
d3 = 0.00513428
x5 := phi(x4)
d4 := |x5 - x4|
x5 = 1.01103
d4 = 0.00378493
x6 := phi(x5)
d5 := |x6 - x5|
x6 = 1.00823
d5 = 0.00280249
x7 := phi(x6)
d6 := |x7 - x6|
x7 = 1.00614
d6 = 0.00208183
x8 := phi(x7)
d7 := |x8 - x7|
x8 = 1.00459
d7 = 0.00155023
x9 := phi(x8)
d8 := |x9 - x8|
x9 = 1.00344
d8 = 0.00115646
x10 := phi(x9)
d9 := |x10 - x9|
x10 = 1.00257
d9 = 0.000863878
x11 := phi(x10)
d10 := |x11 - x10|
x11 = 1.00193
d10 = 0.000645967
x12 := phi(x11)
d11 := |x12 - x11|
x12 = 1.00144
d11 = 0.000483387
x13 := phi(x12)
d12 := |x13 - x12|
x13 = 1.00108
d12 = 0.00036193
x14 := phi(x13)
d13 := |x14 - x13|
x14 = 1.00081
d13 = 0.000271105
x15 := phi(x14)
d14 := |x15 - x14|
x15 = 1.00061
d14 = 0.000203136
x16 := phi(x15)
d15 := |x16 - x15|
x16 = 1.00046
d15 = 0.000152244
x17 := phi(x16)
d16 := |x17 - x16|
x17 = 1.00034
d16 = 0.000114122
x18 := phi(x17)
d17 := |x18 - x17|
x18 = 1.00026
d17 = 8.55577e-5
# Наибольший положительный корень уравнения:
# x18 = 1
# Ответ: 1
