# 1)
f(x) := log(x) - cos(x)
x := 0.1, 0.11 .. 2
f(x) := log(x) - cos(x)
a := 1
b := 2
eps := 10^-4
bisect(a, b, eps) :=
    while |b - a| > eps
        c ← (a + b)/2
        b ← c if f(a)*f(c) < 0
        a ← c otherwise
    c
root(f(x), x) = [
    1.41841; 1.41841; 1.41841; 1.41841; 1.41841; 1.41841; 1.41841; 1.41841; 1.41841; 1.41841
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]
x0 := bisect(a, b, eps)
x0 = 1.4184
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# Ответ: 1.418
