# 2) | Метод простой итерации
ϕ(x) := sqrt(3.2*x + 1)
f(x) := x^2 - 3.2*x - 1
x0 := 3
x := -2, -1.99 .. 5
eps := 10^-4
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iter(x0, eps) :=
    x_old ← x0
    x_new ← ϕ(x_old)
    while |x_new - x_old| > eps
        x_old ← x_new
        x_new ← ϕ(x_old)
    x_new
x := iter(x0, eps)
x = 3.48675
x1 := root(f(x), x, -1, 0)
x2 := root(f(x), x, 3, 4)
x1 = -0.286796
x2 = 3.4868
